# ------------------------------------------------------------------
# 1. INITIALIZATION
# ------------------------------------------------------------------
units           metal          # eV and Angstroms (Matches Deng/Du paper)
atom_style      charge
boundary        p p p
read_data       SlabV3.data

# ------------------------------------------------------------------
# 2. ASSIGN CHARGES (From Deng & Du 2016)
# ------------------------------------------------------------------
# 1=Al, 2=B, 3=Na, 4=O, 5=Si

set type 5 charge  1.890   # Si
set type 4 charge -0.945   # O
set type 2 charge  1.418   # B
set type 3 charge  0.473   # Na
set type 1 charge  1.418   # Al
mass 5 28.086	# Si
mass 4 15.999	# O
mass 2 10.811	# B
mass 3 22.990	# Na
mass 1 26.982	# Al

# ------------------------------------------------------------------
# 3. FIX DENSITY & OVERLAPS (The Soft Ramp Method)
# ------------------------------------------------------------------

# A. DEFINE SOFT POTENTIAL
# Start with a "Soft" potential with cutoff 2.5 Angstroms
pair_style      soft 2.5
pair_coeff      * * 0.0 2.5   # Start with Energy A = 0.0 (Ghost atoms)

# B. RAMP REPULSION
# We ramp the pre-factor 'A' from 0.0 to 100.0 eV.
# This slowly "inflates" the atoms, pushing overlapping ones apart gently.
variable        prefactor equal ramp(0.0,100.0)
fix             1 all adapt 1 pair soft a * * v_prefactor

# C. INITIALIZE VELOCITIES
velocity        all create 300.0 12345 dist gaussian
timestep        0.001
thermo          100

print "--- STARTING SOFT RAMP ---"

# D. Run with NVE to let them push apart
fix             2 all nve
run             10000
unfix           1
unfix           2

print "--- SOFT RAMP COMPLETE ---"

# ------------------------------------------------------------------
# 2. REAL POTENTIAL (Buckingham)
# ------------------------------------------------------------------

# Set Buckingham Potential back from Soft
pair_style      buck/coul/long 10.0
kspace_style    pppm 1.0e-4

# (Deng & Du Parameters)
# 1=Al, 2=B, 3=Na, 4=O, 5=Si

pair_coeff 5 4  45296.72   0.161   46.1395 # Si-O
pair_coeff 3 4  120360.22  0.170    0.0000 # Na-O
pair_coeff 4 4   9027.03   0.265   85.0321 # O-O
pair_coeff 1 4  28287.00   0.172   34.7600 # Al-O
pair_coeff 2 4  197810.14  0.1245  35.0020 # B-O
pair_coeff 1 1    351.94   0.360    0.0000 # Al-Al
pair_coeff 1 3    175.21   0.130    0.0000 # Al-Na
pair_coeff 1 5    646.67   0.120    0.0000 # Al-Si
pair_coeff 1 2    137.58   0.479    0.0000 # Al-B
pair_coeff 5 5    834.40   0.290    0.0000 # Si-Si
pair_coeff 5 2    337.70   0.290    0.0000 # Si-B
pair_coeff 2 2    121.10   0.350    0.0000 # B-B
pair_coeff 3 3      0.00   1.000    0.0000 # Na-Na
pair_coeff 5 3      0.00   1.000    0.0000 # Si-Na
pair_coeff 2 3      0.00   1.000    0.0000 # B-Na

# Safety minimization
minimize 1.0e-4 1.0e-6 100 1000
reset_timestep  0

# ------------------------------------------------------------------
# 5. MELT AND QUENCH PROTOCOL
# ------------------------------------------------------------------

# Output settings (Save log info every 1000 steps)
thermo          1000
thermo_style    custom step temp press vol density pe

# Define a trajectory file so you can watch simulation later
# Saves a snapshot every 5000 steps
dump            1 all custom 5000 evolution.lammpstrj id type x y z

# ==========================================================
#
# ==========================================================

# A. Relax at 300K (60ps)
print "--- RELAXING AT 300K FOR 60ps ---"
fix     1 all nvt temp 300.0 300.0 0.1
run     60000
unfix   1

# E. Relax with NVT and NVE (50ps Each)
# NVE allows the energy to fluctuate without a thermostat
print "--- RELAXING STRUCTURE WITH NVT AND NVE ---"
fix     3 all nvt temp 300.0 300.0 0.1
run     50000
unfix   3
fix     4 all nve
run     50000
unfix   4

# ------------------------------------------------------------------
# 5. FINAL OUTPUT
# ------------------------------------------------------------------
write_data      RelaxedSlabV3.data
print "--- SIMULATION COMPLETE ---"
